*Heading
** Job name: UnitCell_00004 Model name: Model-1
** Generated by: Abaqus/CAE 6.14-2
*Preprint, echo=NO, model=NO, history=NO, contact=NO
**
** PARTS
**
*Part, name=BackRef
*Node
      1,           0., 0.00377974915, 0.0021822392
*Nset, nset=BackRef-RefPt_, internal
1,
*End Part
**
*Part, name=BottomRef
*Node
      1, 0.0021822392, 0.00377974915,           0.
*Nset, nset=BottomRef-RefPt_, internal
1,
*End Part
**
*Part, name=FrontRef
*Node
      1, 0.0043644784, 0.00377974915, 0.0021822392
*Nset, nset=FrontRef-RefPt_, internal
1,
*End Part
**
*Part, name=LeftRef
*Node
      1, 0.0021822392, 0.00755949831, 0.0021822392
*Nset, nset=LeftRef-RefPt_, internal
1,
*End Part
**
*Part, name=QuarterCell
*Node
      1, -0.00400949828, 0.0043644784,           0.
      2, -0.00504926918, 0.00185424939,           0.
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*Element, type=C3D8R
   1,   37,    1,   68,  895, 1235,  146, 1005, 7453
   2,   38,   37,  895,  896, 1236, 1235, 7453, 7454
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*Nset, nset=Fiber
     1,     2,     3,     4,     5,     6
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*Elset, elset=Fiber, generate
     1,  15552,      1
*Nset, nset=Matrix
     1,     2,     5,     8,     9,    11
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*Elset, elset=Matrix, generate
 15553,  21792,      1
*Orientation, name=Ori-1
1., 0., 0., 0., 1., 0.
2, -90.
** Section: FIBERSECTION
*Solid Section, elset=Fiber, orientation=Ori-1, material=FIBERMATERIAL
,
** Section: MATRIXSECTION
*Solid Section, elset=Matrix, material=MATRIXMATERIAL
,
*End Part
**
*Part, name=RightRef
*Node
      1, 0.0021822392,           0., 0.0021822392
*Nset, nset=RightRef-RefPt_, internal
1,
*End Part
**
*Part, name=TopRef
*Node
      1, 0.0021822392, 0.00377974915, 0.0043644784
*Nset, nset=TopRef-RefPt_, internal
1,
*End Part
**
**
** ASSEMBLY
**
*Assembly, name=Assembly
**
*Instance, name=QuarterCell-1, part=QuarterCell
          0.,           0., 0.00436447844228091
          0.,           0., 0.00436447844228091, -0.577350279552042, 0.577350279552042, -0.572985801109761, 119.999999109416
*End Instance
**
*Instance, name=FrontRef-1, part=FrontRef
*End Instance
**
*Instance, name=BackRef-1, part=BackRef
*End Instance
**
*Instance, name=RightRef-1, part=RightRef
*End Instance
**
*Instance, name=LeftRef-1, part=LeftRef
*End Instance
**
*Instance, name=TopRef-1, part=TopRef
*End Instance
**
*Instance, name=BottomRef-1, part=BottomRef
*End Instance
**
*Nset, nset=BackPoint, instance=BackRef-1
 1,
*Nset, nset=BottomPoint, instance=BottomRef-1
 1,
*Nset, nset=Front, instance=QuarterCell-1
    5,    6,    7,    8,   11,   12
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*Nset, nset=FrontPoint, instance=FrontRef-1
 1,
*Nset, nset=Left, instance=QuarterCell-1
    9,   10,   11,   12,   25,   26
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*Nset, nset=LeftPoint, instance=LeftRef-1
 1,
*Nset, nset=RightPoint, instance=RightRef-1
 1,
*Nset, nset=Top, instance=QuarterCell-1
   13,   16,   19,   20,   22,   24
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*Nset, nset=TopPoint, instance=TopRef-1
 1,
*Nset, nset="XY Plane", instance=QuarterCell-1
    1,    4,    7,    8,   25,   26
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*Nset, nset="XZ Plane", instance=QuarterCell-1
   21,   22,   23,   24,   27,   28
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*Nset, nset="YZ Plane", instance=QuarterCell-1
    1,    2,    3,    4,    9,   10
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** Constraint: FrontFacePlanar
*Equation
2
Front, 1, 1.
FrontPoint, 1, -1.
** Constraint: LeftFacePlanar
*Equation
2
Left, 2, 1.
LeftPoint, 2, -1.
** Constraint: TopFacePlanar
*Equation
2
Top, 3, 1.
TopPoint, 3, -1.
*End Assembly
**
** MATERIALS
**
*Material, name=FIBERMATERIAL
*Elastic, type=ENGINEERING CONSTANTS
235000.,14000.,14000.,   0.2,   0.2,  0.25,28000.,28000.
 5600.,
*Material, name=MATRIXMATERIAL
*Elastic
48000., 0.34
**
** BOUNDARY CONDITIONS
**
** Name: X-Symm Type: Symmetry/Antisymmetry/Encastre
*Boundary
"YZ Plane", XSYMM
** Name: Y-Symm Type: Symmetry/Antisymmetry/Encastre
*Boundary
"XZ Plane", YSYMM
** Name: Z-Symm Type: Symmetry/Antisymmetry/Encastre
*Boundary
"XY Plane", ZSYMM
** ----------------------------------------------------------------
**
** STEP: Step-1
**
*Step, name=Step-1, nlgeom=NO, inc=1000
*Static
1., 1., 1e-08, 1.
**
** LOADS
**
** Name: LeftLoad   Type: Concentrated force
*Cload
LeftPoint, 2, 0.02
**
** OUTPUT REQUESTS
**
*Restart, write, frequency=0
**
** FIELD OUTPUT: F-Output-1
**
*Output, field, variable=PRESELECT, frequency=99999
**
** HISTORY OUTPUT: H-Output-1
**
*Output, history, frequency=99999
*Node Output, nset=FrontPoint
U1,
**
** HISTORY OUTPUT: H-Output-2
**
*Node Output, nset=LeftPoint
U2,
**
** HISTORY OUTPUT: H-Output-3
**
*Node Output, nset=TopPoint
U3,
*End Step
